500/3 = 166.667
666.668 m*(250 m) = 0.166667 km^2
916.668 m*(500.001 m) = 0.458335 km^2
0.5*166.667*m = 83.3335 m
916.668 m*416.668*m = 0.381946 km^2
200 m*(666.668 m) = 0.133334 km^2
333.334 m*83.334*m = 0.0277781 km^2
0.028 km^2 + 0.133 km^2 + 0.382 km^2 = 0.543 km^2
0.75*166.667*m = 125 m
250 m*(333.334 m) = 0.0833335 km^2
1*166.667*m = 166.667 m
333.334 m*333.334*m/2 = 0.0555558 km^2
1.2*166.667*m = 200 m
1.5*166.667*m = 250 m
2*166.667*m = 333.334 m
500.001 m*333.334*m = 0.166667 km^2
333.334 m*333.334*m = 0.111112 km^2
500.001 m*666.668*m/2 + 833.335 m*750.001*m + 666.668 m*166.667*m = 0.902781 km^2
2.5*166.667*m = 416.668 m
416.668 m*(250 m) = 0.104167 km^2
2.75*166.667*m = 458.334 m
3*166.667*m = 500.001 m
250 m*458.334*m = 0.114584 km^2
333.334 m*333.334*m = 0.111112 km^2
250 m*500.001*m = 0.125 km^2
3.5*166.667*m = 583.335 m
4*166.667*m = 666.668 m
416.668 m*500.001*m + 750.001 m*750.001*m = 0.770836 km^2
4.5*166.667*m = 750.001 m
166.667 m*83.334*m = 0.013889 km^2
5*166.667*m = 833.335 m
5.5*166.667*m = 916.668 m
500.001 m*(833.335 m) + 333.334 m*125*m + 166.667 m*(0.875*166.667*m) + 166.667 m*583.335*m = 0.579863 km^2
0.58 + 0.167 + 1.125 = 1.872
6*166.667*m = 1000 m
250 m*666.668*m = 0.166667 km^2
666.668 m*916.668*m + 416.668 m*1.083*10^3*m + 166.667 m*375.001*m = 1.12486 km^2
6.5*166.667*m = 1083.34 m
34*20 = 680
750.001 m*333.334*m + 416.668 m*(250 m) + 250 m*(83.334 m) = 0.375001 km^2
680/60 = 11.3333
1*10^3*m*(666.668 m) = 0.666668 km^2
83.334 m*(250 m) = 0.0208335 km^2
416.668 m*666.668*m = 0.277779 km^2
166.667 m*583.335*m + 833.335 m*(166.667 m) + 833.335 m*166.667*m + 833.335 m*1*10^3*m/2 + 916.668 m*1.083*10^3*m + 500.001 m*666.668*m/2 + 833.335 m*750.001*m + 666.668 m*(166.667 m) = 2.6872 km^2
res := 30000/4.665 = 6430.87
166.667 m*166.667*m + 166.667 m*166.667*m + 333.334 m*833.335*m = 0.333335 km^2
a1 := res*0.167 = 1073.95
a2 := res*0.458 = 2945.34
a3 := res*0.056 = 360.129
a4 := res*0.167 = 1073.95
a5 := res*1.872 = 12038.6
a6 := res*0.104 = 668.81
a7 := res*0.115 = 739.55
a8 := res*0.771 = 4958.2
a9 := res*0.667 = 4289.39
a10 := res*0.278 = 1787.78
a1 + a2 + a3 + a4 + a5 + a6 + a7 + a8 + a9 + a10 = 29935.7
