q := 0.05
a_2 := -0.1830
a_1 := -1.8004
a_0 := 7.0579
h := 6.6
0.7*m^3/hr = 0.000194444 m^3/s
h == -a_2*q^2 + a_1*ω*q + a_0*ω^2 solve, ω → [-0.960627502596; 0.973382004644] = [-0.960628; 0.973382]
0.7/(60*60) = 0.000194444
1000*kg/m^3*9.81*m/s^2*4*m = 39.24 kPa
101.325 kPa + 1000*kg/m^3*9.81*m/s^2*4*m = 140.565 kPa
(101.325 kPa + 1000*kg/m^3*9.81*m/s^2*4*m) - 101.325 kPa = 39.24 kPa
